θ := 10
θ := θ*π/180
φ := 10
φ := φ*π/180
θ := 0 .. π  # disabled
φ := 0 .. 2*π  # disabled
# Opredelenie napravlenii oblycheniya i priema i polyarizacii
CP(θ) := cos(θ)
CF(φ) := cos(φ)
SP(θ) := sin(θ)
SF(φ) := sin(φ)
R0(θ, φ) := [CP(θ); -SP(θ)*SF(φ); -SP(θ)*CF(φ)]
RR(θ, φ) := [-CP(θ); SP(θ)*SF(φ); SP(θ)*CF(φ)]
φ_nab := 100
φ_nab := φ_nab*π/180
φ_nab := 0 .. 20*deg  # disabled
CFG(φ, φ_nab) := cos(φ + φ_nab)
SFG(φ, φ_nab) := sin(φ + φ_nab)
R1(θ, φ, φ_nab) := [-CP(θ); SP(θ)*SFG(φ, φ_nab); SP(θ)*CFG(φ, φ_nab)]
P0(φ) := [0; CF(φ); -SF(φ)]
P1(φ, φ_nab) := [0; -CFG(φ, φ_nab); -SFG(φ, φ_nab)]
PK0(θ, φ) := [SP(θ); CP(θ)*SF(φ); CP(θ)*CF(φ)]
PK1(θ, φ, φ_nab) := [-SP(θ); -CP(θ)*SFG(φ, φ_nab); -CP(θ)*CFG(φ, φ_nab)]
λ := 0.3
k := 2*π/λ
PK0(θ, φ) = [0.173648; 0.17101; 0.969846]
x_1 := 1
y_1 := 0
z_1 := 0
x_2 := 0
y_2 := 1
z_2 := 0
x_3 := 0
y_3 := 0
z_3 := 1
PK1(θ, φ, φ_nab) = [-0.173648; -0.925417; 0.336824]
Z1 := [x_1; y_1; z_1]
Z2 := [x_2; y_2; z_2]
Z3 := [x_3; y_3; z_3]
Z[1, 1] := x_1
Z[1, 2] := y_1
Z[1, 3] := z_1
Z[2, 1] := x_2
Z[2, 2] := y_2
Z[2, 3] := z_2
Z[3, 1] := x_3
Z[3, 2] := y_3
Z[3, 3] := z_3
ad := 10^-3
dd := |(Z2 - Z1)×(Z3 - Z1)|
dd := 0.5*dd  # disabled
dd = 1.73205
DR0(θ, φ, φ_nab) := RR(θ, φ) + R1(θ, φ, φ_nab)
DR1 := Z2 - Z3
DR2 := Z1 - Z3
DR0(θ, φ, φ_nab) = [-1.96962; 0.19333; 0.111619]
a1(θ, φ, φ_nab) := sum(transpose(DR0(θ, φ, φ_nab))[:, m]*transpose(DR1)[:, m], m = 0 .. 2)
DR1 = [0; 1; -1]
DR2 = [1; 0; -1]
a2(θ, φ, φ_nab) := sum(transpose(DR0(θ, φ, φ_nab))[:, m]*transpose(DR2)[:, m], m = 0 .. 2)
a1(θ, φ, φ_nab) := -a1(θ, φ, φ_nab)/k
a1(θ, φ, φ_nab) = -0.0039014
a2(θ, φ, φ_nab) := -a2(θ, φ, φ_nab)/k
a2(θ, φ, φ_nab) = 0.0993716
n0_1 := (Z2 - Z1)×(Z3 - Z1)/|(Z2 - Z1)×(Z3 - Z1)|
n0_2 := (Z1 - Z2)×(Z3 - Z2)/|(Z1 - Z2)×(Z3 - Z2)|
n0_3 := (Z1 - Z3)×(Z2 - Z3)/|(Z1 - Z3)×(Z2 - Z3)|
tes(θ, φ) := 3*sum(transpose(RR(θ, φ))[:, m]*transpose(n0_1)[:, m], m = 0 .. 2)
n0_1 := if(tes(θ, φ) > 0, neg(□, n0_1), n0_1)
n0_2 := if(tes(θ, φ) > 0, -n0_2, n0_2)
n0_3 := if(tes(θ, φ) > 0, -n0_3, n0_3)
n := n0_1
tes(θ, φ) := sum(transpose(P0(φ))[:, m]*transpose(n)[:, m], m = 0 .. 2)
tes(θ, φ) = 0.468323
P0t(θ, φ) := P0(φ) - n*tes(θ, φ)
tes(θ, φ) := sum(transpose(RR(θ, φ))[:, m]*transpose(n)[:, m], m = 0 .. 2)
tes(θ, φ) = -0.452437
tes2(θ, φ) := if(|tes(θ, φ)| > 0.001, tes(θ, φ), 0)
tol := 0
m1 := 1
e1 := 1
c0(θ, φ) := sqrt(1 - (1 - tes2(θ, φ)^2)/(e1*m1))
c2(θ, φ) := c0(θ, φ)
c1(θ, φ) := k*tol*c0(θ, φ)*sqrt(m1*e1)
c(θ, φ) := sqrt(m1/e1)*c0(θ, φ)*sin(c1(θ, φ))/cos(c1(θ, φ))
c0(θ, φ) := 2*tes2(θ, φ)
c1(θ, φ) := (1i*c0(θ, φ) - 1)/(1i*c0(θ, φ) + 1)
R0p(θ, φ) := n×RR(θ, φ)
c1(θ, φ) = -0.0996278 - 0.995025i
c0(θ, φ) = -0.904874
c(θ, φ) = 0
R0t(θ, φ) := RR(θ, φ) - (n*tes2(θ, φ))
P1t(θ, φ) := if(tol == 0, c1(θ, φ)*P0t(θ, φ) + 0 + R0p(θ, φ)*sum(transpose(R0p(θ, φ))[:, m]*transpose(P0(φ))[:, m], m = 0 .. 2)/(e1/m1*(1i*c(θ, φ) + c2(θ, φ)^2/tes2(θ, φ))), c1(θ, φ)*P0t(θ, φ) + 1i*2*c(θ, φ)/(1i*c0(θ, φ) + 1)*R0t(θ, φ)*sum(transpose(R0t(θ, φ))[:, m]*transpose(P0(φ))[:, m], m = 0 .. 2)/(1i*c(θ, φ)*tes2(θ, φ)) + R0p(θ, φ)*sum(transpose(R0p(θ, φ))[:, m]*transpose(P0(φ))[:, m], m = 0 .. 2)/(e1/m1*(1i*c(θ, φ) + c2(θ, φ)^2/tes2(θ, φ))))
tes5(θ, φ) := sum(transpose(RR(θ, φ))[:, m]*transpose(P1t(θ, φ))[:, m], m = 0 .. 2)
Pr1(θ, φ) := P1t(θ, φ) + n*tes5(θ, φ)/tes(θ, φ)
RR1(θ, φ) := RR(θ, φ) - 2*n*tes(θ, φ)
Et(φ) := n×P0(φ)
cn := n + 1i
Et(θ, φ) := Et(φ) + (cn×Pr1(θ, φ))
Et(θ, φ) = [-0.541119 + 2.88324i; -0.225697 - 0.963595i; 0.766816 - 1.91964i]
tes(θ, φ) := sum(transpose(RR(θ, φ))[:, m]*transpose(n)[:, m], m = 0 .. 2)
Ht(θ, φ) := P0(φ)*tes(θ, φ) - RR(θ, φ)*sum(transpose(P0(φ))[:, m]*transpose(n)[:, m], m = 0 .. 2)
Ht(θ, φ) = [0.461208; -0.459685; -0.00152311]
# Vichiclenie integrala po trem tochkam
________________________________________________________________________________________
tes(θ, φ) := sum(transpose(RR1(θ, φ))[:, m]*transpose(n)[:, m], m = 0 .. 2)
tes(θ, φ) = 0.452437
cdr3(θ, φ) := Pr1(θ, φ)*tes(θ, φ)
tes5(θ, φ) := sum(transpose(Pr1(θ, φ))[:, m]*transpose(n)[:, m], m = 0 .. 2)
tes5(θ, φ) = 0.046658 + 0.465993i
cdr3(θ, φ) := cdr3(θ, φ) - RR1(θ, φ)*tes5(θ, φ)
cdr3(θ, φ) = [0.107668 + 0.458914i; -0.55224 - 0.457398i; 0.444572 - 0.00151553i]
tes(θ, φ) := sum(transpose(RR1(θ, φ))[:, m]*transpose(Z3)[:, m], m = 0 .. 2)
tes(θ, φ) = 0.693439
Ht(θ, φ) := Ht(θ, φ) + cdr3(θ, φ)
Ht(θ, φ) = [0.568876 + 0.458914i; -1.01193 - 0.457398i; 0.443049 - 0.00151553i]
c - (-(-(-(-(-(-(-(-(-(-(-(-(-(-(-(-(-(-(-(-(-(-(-(-(-(-(-(-(-(-(-(-(-(-(-(-(-(-(-(-(-(-(-(-(-(-(-(-(-(-(-(-(-(-(-(-□))))))))))))))))))))))))))))))))))))))))))))))))))))))))
a(θ, φ, φ_nab) := sum(transpose(Et(θ, φ))[:, m]*transpose(P1(φ, φ_nab)×R1(θ, φ, φ_nab))[:, m], m = 0 .. 2)
a(θ, φ, φ_nab) = -0.0225625 - 1.15477i
tes(θ, φ, φ_nab) := sum(transpose(P1(φ, φ_nab))[:, m]*transpose(R1(θ, φ, φ_nab))[:, m], m = 0 .. 2)
tes(θ, φ, φ_nab) = 0.111619
dr3(θ, φ, φ_nab) := R1(θ, φ, φ_nab)*tes(θ, φ, φ_nab)
dr3(θ, φ, φ_nab) := P1(φ, φ_nab) - dr3(θ, φ, φ_nab)
dr3(θ, φ, φ_nab) = [0.109923; 0.323807; -0.933063]
a(θ, φ, φ_nab) := a(θ, φ, φ_nab) + sum(transpose(Ht(θ, φ))[:, m]*transpose(dr3(θ, φ, φ_nab))[:, m], m = 0 .. 2)
a(θ, φ, φ_nab) = -0.701091 - 1.25102i
f(θ, φ, φ_nab) := [a(θ, φ, φ_nab); a(θ, φ, φ_nab); a(θ, φ, φ_nab)]
f(θ, φ, φ_nab) = [-0.701091 - 1.25102i; -0.701091 - 1.25102i; -0.701091 - 1.25102i]
Bi0 := [1/6; 1/6; 1/2]
Bi0 = [0.166667; 0.166667; 0.5]
Bi1 := [
    -0.5*(-1/a1(θ, φ, φ_nab)^2 - 1/(a1(θ, φ, φ_nab) - 1i)/a1(θ, φ, φ_nab) + (round(1/a1(θ, φ, φ_nab)^2) + (1/(a1(θ, φ, φ_nab) - 1i))^2)*(e^(1i*a1(θ, φ, φ_nab)) - 1)/(1i*a1(θ, φ, φ_nab)));
    1/6;
    ((1 - 1i*a1(θ, φ, φ_nab))*e^(1i*a1(θ, φ, φ_nab)) - 1)/a1(θ, φ, φ_nab)^2
]
Bi1 = [1.12615 - 64.0749i; 0.166667; 0.499998 - 0.00130046i]
Bi2 := [
    -((e^(1i*a2(θ, φ, φ_nab)) - 1)/(1i*a2(θ, φ, φ_nab)) - 1 - 1i/2*a2(θ, φ, φ_nab))/a2(θ, φ, φ_nab)^2;
    -(1 - (e^(1i*a2(θ, φ, φ_nab)) - 1)/(1i*a2(θ, φ, φ_nab)) + (-(1i*a2(θ, φ, φ_nab)*e^(1i*a2(θ, φ, φ_nab)) - e^(1i*a2(θ, φ, φ_nab)) + 1)/(1i*a2(θ, φ, φ_nab))))/a2(θ, φ, φ_nab)^2;
    ((e^(1i*a2(θ, φ, φ_nab)) - 1)/(1i*a2(θ, φ, φ_nab)) - 1)/(1i*a2(θ, φ, φ_nab))
]
Bi2 = [0.166584 + 0.00413912i; -0.499589 + 10.0467i; 0.499589 + 0.0165538i]
Bi3 := [
    -(1 - (e^(1i*a1(θ, φ, φ_nab)) - 1)/(1i*a1(θ, φ, φ_nab)) + (1i*a1(θ, φ, φ_nab)*e^(1i*a1(θ, φ, φ_nab)) - e^(1i*a1(θ, φ, φ_nab)) + 1)/(1i*a1(θ, φ, φ_nab)))/a1(θ, φ, φ_nab)^2;
    -((e^(1i*a1(θ, φ, φ_nab)) - 1)/(1i*a1(θ, φ, φ_nab)) - 1 - 1i/2*a1(θ, φ, φ_nab))/a1(θ, φ, φ_nab)^2;
    (e^(1i*a1(θ, φ, φ_nab)) - 1)/(1i*a1(θ, φ, φ_nab) - 1)/(1i*a1(θ, φ, φ_nab))
]
Bi3 = [0.166666 - 0.000325118i; 0.166667 - 0.000162558i; -0.999975 + 0.005852i]
Bi4 := [
    -((e^(1i*a2(θ, φ, φ_nab)) - 1)/(1i*a2(θ, φ, φ_nab)) - (e^(1i*a1(θ, φ, φ_nab)) - 1)/(1i*a1(θ, φ, φ_nab)) - (a2(θ, φ, φ_nab) - a1(θ, φ, φ_nab))*(1i*a1(θ, φ, φ_nab)*e^(1i*a1(θ, φ, φ_nab)) - e^(1i*a1(θ, φ, φ_nab)) + 1)/(1i*a1(θ, φ, φ_nab)^2))/(a2(θ, φ, φ_nab) - a1(θ, φ, φ_nab))^2;
    -((e^(1i*a1(θ, φ, φ_nab)) - 1)/(1i*a1(θ, φ, φ_nab)) - (e^(1i*a2(θ, φ, φ_nab)) - 1)/(1i*a2(θ, φ, φ_nab)) - (a1(θ, φ, φ_nab) - a2(θ, φ, φ_nab))*(1i*a2(θ, φ, φ_nab)*e^(1i*a2(θ, φ, φ_nab)) - e^(1i*a2(θ, φ, φ_nab)) + 1)/(1i*a2(θ, φ, φ_nab)^2))/(a2(θ, φ, φ_nab) - a1(θ, φ, φ_nab))^2;
    ((e^(1i*a2(θ, φ, φ_nab)) - 1)/(1i*a2(θ, φ, φ_nab)) - (e^(1i*a1(θ, φ, φ_nab)) - 1)/(1i*a1(θ, φ, φ_nab)))/(1i*(a2(θ, φ, φ_nab) - a1(θ, φ, φ_nab)))
]
Bi4 = [0.16659 + 0.00381411i; 0.166426 + 0.00811312i; 0.499604 + 0.0159038i]
Bi := if(|a1(θ, φ, φ_nab)| < ad and |a2(θ, φ, φ_nab)| < ad, Bi0, Bi1)
Bi := if(|a1(θ, φ, φ_nab)| ≥ ad and |a2(θ, φ, φ_nab)| ≥ ad, Bi, Bi2)
Bi := if(|a1(θ, φ, φ_nab)| < ad and |a2(θ, φ, φ_nab)| ≥ ad, Bi, Bi3)
Bi := if(|a2(θ, φ, φ_nab)| < ad and |a1(θ, φ, φ_nab)| ≥ ad, Bi, Bi4)
Bi = [0.16659 + 0.00381411i; 0.166426 + 0.00811312i; 0.499604 + 0.0159038i]
tes(θ, φ, φ_nab) := sum(transpose(R1(θ, φ, φ_nab))[:, m] + transpose(RR(θ, φ))[:, m]*transpose(Z3)[:, m], m = 0 .. 2)
tes(θ, φ, φ_nab) = [-0.710013]
ep := e^(-1i*k*tes(θ, φ, φ_nab))*dd*((transpose(f(θ, φ, φ_nab))[:, 0] - transpose(f(θ, φ, φ_nab))[:, 1])*transpose(Bi)[:, 2] + (transpose(f(θ, φ, φ_nab))[:, 1] - transpose(f(θ, φ, φ_nab))[:, 2])*transpose(Bi)[:, 0] + transpose(f(θ, φ, φ_nab))[:, 2]*transpose(Bi)[:, 2])
(transpose(f(θ, φ, φ_nab))[:, 0] - transpose(f(θ, φ, φ_nab))[:, 1])*transpose(Bi)[:, 2] = 0
ep = [1.20166 + 0.31238i]
transpose(f(θ, φ, φ_nab))[:, 2]*transpose(Bi)[:, 2] = -0.330372 - 0.636167i
(transpose(f(θ, φ, φ_nab))[:, 1] - transpose(f(θ, φ, φ_nab))[:, 2])*transpose(Bi)[:, 0] = 0
e^(-1i*k*tes(θ, φ, φ_nab)) = [-0.669332 + 0.742963i]
-0.111 - 1.017i
